// COMSOL Multiphysics 6.0.0.405 model "graphite-thermal-conductivity-porous-2D-20pts.mph"
// Outline of the model tree

Parameters
  total_t = 4[mm]
  pm_scale = 0.5
  v1 = 0.9
  v2 = 1-v1
  k1 = 10[W/(m*K)]
  k2 = 2[W/(m*K)]
  k_PM_1 = k1*v1 + k2*v2*(3*k1/(2*k1+k2))/(v1+v2*(3*k1)/(2*k1+k2))
  k_PM_2 = (sqrt((2*k1*v1 - k1*v2 - k2*v1 + 2*k2*v2)^2 - 4*(-2*v1 - 2*v2)*(k1*k2*v1 + k1*k2*v2)) + 2*k1*v1 - k1*v2 - k2*v1 + 2*k2*v2)/(4*(v1 + v2))
  k_PM = k_PM_1
  cp_g = 1.5[J/g/K]
  cp_p = 2[J/g/K]
  rho_g = 1.6[g/cm^3]
  rho_p = 1.4[g/cm^3]
  cp_PM = cp_g*v1 + cp_p*v2
  rho_PM = rho_g*v1+rho_p*v2
  k_g = k1
  k_p = k2

Probes
  bnd1: Boundary "eff_k" on boundaries 4 | expr = -ht.ntflux/20[K]*total_t; unit = W/(m*K); table = tbl1
  dom1: Domain "v_graphite" (disabled) on no domains | type = integral; unit = m^2; descr = 1; table = tbl2
  dom2: Domain "v_porous" (disabled) on domains 3, 6 | type = integral; unit = m^2; descr = 1; table = tbl2
  dom3: Domain "v_putty" (disabled) on domains 1, 2, 4, 5 | type = integral; unit = m^2; descr = 1; table = tbl2
  var1: GlobalVariable "half_temp" (disabled)
    expr = 10[W/cm^2]*1[cm]*1[m]*1[s]/(dom1*1[m]*rho_g*cp_g + dom2*1[m]*rho_PM*cp_PM + dom3*1[m]*rho_p*cp_p)/2+293.15[K]
    unit = K
    descr = half_temp
    table = tbl1
  var2: GlobalVariable "alpha_app" (disabled)
    expr = 1.38*total_t^2/(pi^2*1.521)
    unit = mm^2
    descr = alpha_app
    table = tbl3
  var3: GlobalVariable "alpha_mean" (disabled)
    expr = total_t^2/(dom1/1[cm]*rho_g*cp_g + dom2/1[cm]*rho_PM*cp_PM + dom3/1[cm]*rho_p*cp_p)*(1/(dom1/1[cm]/k_g + dom2/1[cm]/k_PM + dom3/1[cm]/k_p))
    unit = mm^2/s
    descr = alpha_mean
    table = tbl3

Geometry
  geom1 "Geometry 1" (2D, length unit m)
    imp1: Import
      type = dxf
      filename = /Users/shomikverma/Documents/GitHub/graphite-modeling/fusion add-in/generate_dxf/dxf_geometries/test2D_20_pts_0.03_depth_9.dxf
    sca1: Scale | input = imp1; isotropic = 0.001; factor = 0.001
    r1: Rectangle | pos = {0, (0.003-total_t)/2}; size = {0.01, total_t}
    r2: Rectangle (disabled) | pos = {0, 0.003/2-pm_t/2}; size = {1[cm], pm_t}
    copy1: Copy | input = sca1; keep = on; displx = 0; disply = 0
    sca2: Scale
      input = copy1
      type = anisotropic
      anisotropic = {1, pm_scale}
      factor = {1, pm_scale}
      pos = {0, 0.003/2}
    fin: Finalize "Form Union"

Materials
  mat1: Common "graphite" on domains 4, 5
    def "Basic"
      thermalconductivity = k_g
      density = rho_g
      heatcapacity = cp_g
  mat2: Common "putty" on domains 1, 2
    def "Basic"
      thermalconductivity = k_p
      density = rho_p
      heatcapacity = cp_p
  mat3: Common "PM" on domains 3, 6
    def "Basic"
      density = rho_PM
      heatcapacity = cp_PM
      porosity = 0
      thermalconductivity = k_PM

Physics
  ht: HeatTransfer "Heat Transfer in Solids" on all domains
    dependent variable T
    solid1: SolidHeatTransferModel "Solid 1" (default)
    init1: init "Initial Values 1" (default)
    ins1: ThermalInsulation (default)
    temp1: TemperatureBoundary "Temperature 1" on boundaries 4 | T0 = 293.15[K]+20[K]
    temp2: TemperatureBoundary "Temperature 2" on boundaries 2
    porous1: PorousMediumHeatTransferModel "Porous Medium 1" (disabled) on domains 3, 6
      PorousMediumType = LocalThermalEquilibrium
      EffectiveConductivity = EquivalentThermalConductivity
      k_eqt_mat = userdef
      k_eqt = 0
      fluid1: FluidPorousMediumHeatTransferModel "Fluid 1" (default)
      pm1: PorousMatrixPorousMediumHeatTransferModel "Porous Matrix 1" (default)
    solid2: SolidHeatTransferModel "Solid 2" (disabled) on domains 3, 6
    hf1: HeatFluxBoundary "Heat Flux 1" (disabled) on boundaries 2 | q0_input = 10[W/cm^2]*ONOFF; materialType = nonSolid
  ev: Events on all domains
    ds1: DiscreteStates | dim = ONOFF; dimInit = 1
    expl1: ExplicitEvent | start = 1; reInitName = ONOFF; reInitValue = 0

Mesh
  mesh1 "Mesh 1" (physics-controlled)
    size: MeshSizeDefault | hauto = 9

Studies
  std1 "Study 1"
    stat: Stationary

Solver configurations
  sol1 "Solution 1" (study std1)
    v1: Variables "Dependent Variables 1"
    s1: Stationary "Stationary Solver 1"
      fc1: FullyCoupled | linsolver = d1; initstep = 0.01; minstep = 1.0E-6; maxiter = 50
      d1: Direct "Direct, heat transfer variables (ht)" | linsolver = pardiso; pivotperturb = 1.0E-13

Datasets
  dset1: Solution | solution = sol1
  dset2: Solution "Probe Solution 2" | solution = sol1
  avh1: Average "eff_k" on boundaries 4 | data = dset2
  int1: Integral "v_graphite" | data = dset2
  int2: Integral "v_porous" | data = dset2
  int3: Integral "v_putty" | data = dset2

Derived values
  pev1: EvalPoint "eff_k" | data = avh1; table = tbl1; expr = -ht.ntflux/20[K]*total_t
  pev2: EvalPoint "v_graphite" | data = int1; table = tbl2; expr = 1
  pev3: EvalPoint "v_porous" | data = int2; table = tbl2; expr = 1
  pev4: EvalPoint "v_putty" | data = int3; table = tbl2; expr = 1
  gev1: EvalGlobal "half_temp"
    data = dset2
    table = tbl1
    expr = 10[W/cm^2]*1[cm]*1[m]*1[s]/(dom1*1[m]*rho_g*cp_g + dom2*1[m]*rho_PM*cp_PM + dom3*1[m]*rho_p*cp_p)/2+293.15[K]
  gev2: EvalGlobal "alpha_app" | data = dset2; table = tbl3; expr = 1.38*total_t^2/(pi^2*1.521)
  gev3: EvalGlobal "alpha_mean"
    data = dset2
    table = tbl3
    expr = total_t^2/(dom1/1[cm]*rho_g*cp_g + dom2/1[cm]*rho_PM*cp_PM + dom3/1[cm]*rho_p*cp_p)*(1/(dom1/1[cm]/k_g + dom2/1[cm]/k_PM + dom3/1[cm]/k_p))

Tables
  tbl1: Table "Probe Table 1"
    -ht.ntflux/20[K]*total_t (W/(m*K)), eff_k
    4.33187
  tbl2: Table "Probe Table 2"
    Time (s) | 1 (m^2), v_graphite | 1 (m^2), v_porous | 1 (m^2), v_putty
    0 | 1.34963e-05 | 1.34963e-05 | 1.30073e-05
    0.01 | 1.34963e-05 | 1.34963e-05 | 1.30073e-05
    0.02 | 1.34963e-05 | 1.34963e-05 | 1.30073e-05
    0.03 | 1.34963e-05 | 1.34963e-05 | 1.30073e-05
    0.04 | 1.34963e-05 | 1.34963e-05 | 1.30073e-05
    0.05 | 1.34963e-05 | 1.34963e-05 | 1.30073e-05
    0.06 | 1.34963e-05 | 1.34963e-05 | 1.30073e-05
    0.07 | 1.34963e-05 | 1.34963e-05 | 1.30073e-05
    0.08 | 1.34963e-05 | 1.34963e-05 | 1.30073e-05
    0.09 | 1.34963e-05 | 1.34963e-05 | 1.30073e-05
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  tbl3: Table "Probe Table 3"
    Time (s) | alpha_app (mm^2) | alpha_mean (mm^2/s)
    0 | 1.47086 | 1.68708
    0.01 | 1.47086 | 1.68708
    0.02 | 1.47086 | 1.68708
    0.03 | 1.47086 | 1.68708
    0.04 | 1.47086 | 1.68708
    0.05 | 1.47086 | 1.68708
    0.06 | 1.47086 | 1.68708
    0.07 | 1.47086 | 1.68708
    0.08 | 1.47086 | 1.68708
    0.09 | 1.47086 | 1.68708
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
Plots
  pg3: PlotGroup1D "Probe Plot Group 3"
    tblp1: Table "Probe Table Graph 1" | table = tbl1; xaxisdata = auto; plotcolumns = 1
  pg4: PlotGroup2D "Temperature (ht)" | data = dset1
    surf1: Surface | expr = T
  pg5: PlotGroup2D "Isothermal Contours (ht)" | data = dset1
    con1: Contour | expr = T; levelrounding = off
  pg6: PlotGroup1D "Probe Plot Group 6"
    tblp1: Table "Probe Table Graph 1" | table = tbl2; xaxisdata = auto
    tblp2: Table "Probe Table Graph 2" | table = tbl2
    tblp3: Table "Probe Table Graph 3" | table = tbl2; xaxisdata = auto; plotcolumns = {2, 3, 4}
  pg7: PlotGroup1D "Probe Plot Group 7"
    tblp1: Table "Probe Table Graph 1" | table = tbl3; xaxisdata = auto; plotcolumns = {2, 3}