// COMSOL Multiphysics 6.0.0.405 model "graphite-thermal-conductivity autosaved.mph"
// Outline of the model tree

Probes
  bnd1: Boundary "effective_k" on boundaries 2 | expr = ht.ntflux*3[mm]/20[K]; unit = W/(m*K); table = tbl1

Geometry
  geom1 "Geometry 1" (3D, length unit m)
    imp1: Import
      type = cad
      filename = /Users/maryfoxen/Library/Application Support/Autodesk/Autodesk Fusion 360/API/Scripts/test1/graphite_automated_split v110 pts0.stp
    blk1: Block | pos = {0, -.5[mm], 0}; size = {10 [mm], 3 [mm], 1 [mm]}
    dif1: Difference | input = blk1; input2 = imp1; keepsubtract = on
    fin: Finalize "Form Union"

Materials
  mat1: Common "putty" on domains 1, 4
    def "Basic"
      thermalconductivity = 50
      density = 1
      heatcapacity = 1
  mat2: Common "graphite" on domains 2, 3
    def "Basic"
      thermalconductivity = 5
      density = 1
      heatcapacity = 1

Physics
  ht: HeatTransfer "Heat Transfer in Solids" on all domains
    dependent variable T
    solid1: SolidHeatTransferModel "Solid 1" (default)
    init1: init "Initial Values 1" (default)
    ins1: ThermalInsulation (default)
    temp1: TemperatureBoundary "Temperature 1" on boundaries 17 | T0 = 293.15[K]+20
    temp2: TemperatureBoundary "Temperature 2" on boundaries 2

Mesh
  mesh1 "Mesh 1" (physics-controlled)

Studies
  std1 "Study 1"
    stat: Stationary

Solver configurations
  sol1 "Solution 1" (study std1)
    v1: Variables "Dependent Variables 1"
    s1: Stationary "Stationary Solver 1"
      fc1: FullyCoupled | linsolver = d1; initstep = 0.01; minstep = 1.0E-6; maxiter = 50
      d1: Direct "Direct, heat transfer variables (ht)" | linsolver = pardiso; pivotperturb = 1.0E-13

Datasets
  dset1: Solution | solution = sol1
  dset2: Solution "Probe Solution 2" | solution = sol1
  avh1: Average "effective_k" on boundaries 2 | data = dset2

Derived values
  pev1: EvalPoint "effective_k" | data = avh1; table = tbl1; expr = ht.ntflux*3[mm]/20[K]

Tables
  tbl1: Table "Probe Table 1"
    ht.ntflux*3[mm]/20[K] (W/(m*K)), effective_k
    8.54531

Plots
  pg1: PlotGroup3D "Temperature (ht)" | data = dset1
    surf1: Surface | expr = T
  pg2: PlotGroup3D "Isothermal Contours (ht)" | data = dset1
    iso1: Isosurface | expr = T; levelrounding = off
  pg3: PlotGroup1D "Probe Plot Group 3"
    tblp1: Table "Probe Table Graph 1" | table = tbl1; xaxisdata = auto; plotcolumns = 1