// COMSOL Multiphysics 6.0.0.405 model "graphite-thermal-conductivity-2D.mph"
// Outline of the model tree

Parameters
  total_t = 4[mm]

Probes
  bnd1: Boundary "Boundary Probe 1" on boundaries 4 | expr = -ht.ntflux/20[K]*total_t; unit = W/(m*K); table = tbl1
  dom1: Domain "Domain Probe 1" on domains 3, 4 | type = integral; unit = m^2; descr = 1; table = tbl1

Geometry
  geom1 "Geometry 1" (2D, length unit m)
    imp1: Import
      type = dxf
      filename = /Users/shomikverma/Documents/GitHub/graphite-modeling/fusion add-in/test2D_20_pts_0.03_depth_1.dxf
    sca1: Scale | input = imp1; isotropic = 0.001; factor = 0.001
    r1: Rectangle | pos = {0, (0.003-total_t)/2}; size = {0.01, total_t}
    fin: Finalize "Form Union"

Materials
  mat1: Common "Material 1" on domains 3, 4
    def "Basic"
      thermalconductivity = 5
      density = 1
      heatcapacity = 1
  mat2: Common "Material 2" on domains 1, 2
    def "Basic"
      thermalconductivity = 50
      density = 1
      heatcapacity = 1

Physics
  ht: HeatTransfer "Heat Transfer in Solids" on all domains
    dependent variable T
    solid1: SolidHeatTransferModel "Solid 1" (default)
    init1: init "Initial Values 1" (default)
    ins1: ThermalInsulation (default)
    temp1: TemperatureBoundary "Temperature 1" on boundaries 4 | T0 = 293.15[K]+20[K]
    temp2: TemperatureBoundary "Temperature 2" on boundaries 2

Mesh
  mesh1 "Mesh 1" (physics-controlled)
    size: MeshSizeDefault | hauto = 9

Studies
  std1 "Study 1"
    stat: Stationary

Solver configurations
  sol1 "Solution 1" (study std1)
    v1: Variables "Dependent Variables 1"
    s1: Stationary "Stationary Solver 1"
      fc1: FullyCoupled | linsolver = d1; initstep = 0.01; minstep = 1.0E-6; maxiter = 50
      d1: Direct "Direct, heat transfer variables (ht)" | linsolver = pardiso; pivotperturb = 1.0E-13

Datasets
  dset1: Solution | solution = sol1
  dset2: Solution "Probe Solution 2" | solution = sol1
  avh1: Average "Boundary Probe 1" on boundaries 4 | data = dset2
  int1: Integral "Domain Probe 1" on domains 3, 4 | data = dset2

Derived values
  pev1: EvalPoint "Boundary Probe 1" | data = avh1; table = tbl1; expr = -ht.ntflux/20[K]*total_t
  pev2: EvalPoint "Domain Probe 1" | data = int1; table = tbl1; expr = 1

Tables
  tbl1: Table "Probe Table 1"
    -ht.ntflux/20[K]*total_t (W/(m*K)), Boundary Probe 1
    7.13562

Plots
  pg3: PlotGroup1D "Probe Plot Group 3"
    tblp1: Table "Probe Table Graph 1" | table = tbl1; xaxisdata = auto; plotcolumns = 1
  pg4: PlotGroup2D "Temperature (ht)" | data = dset1
    surf1: Surface | expr = T
  pg5: PlotGroup2D "Isothermal Contours (ht)" | data = dset1
    con1: Contour | expr = T; levelrounding = off